// COMSOL Multiphysics 5.5.0.359 model "capacitor.mph"
// Outline of the model tree

Parameters
  U = 1[V]  // applied voltage
  d = 2[mm]  // electrode spacing
  l = 10[mm]  // plate length
  w = 2[mm]  // plate width

Functions
  step1: Step | funcname = step; location = -0.01; smooth = 0.01
  im1: Image "test_function" | funcname = function; importedname = gaussian.tif; filename = ..\models\gaussian.tif; xmin = -5; xmax = +5; ymin = -5; ymax = +5; extrap = value; argunit = m; fununit = 1/m^2

Selections
  disk1: Disk "anode volume" | entitydim = 2; posx = -d/2-w/2; r = w/10
  adj1: Adjacent "anode surface" | entitydim = 2; input = {disk1}; outputdim = 1
  disk2: Disk "cathode volume" | entitydim = 2; posx = +d/2+w/2; r = w/10
  adj2: Adjacent "cathode surface" | entitydim = 2; input = {disk2}; outputdim = 1
  disk3: Disk "medium 1" | entitydim = 2; posx = -2*d/10; r = d/10
  disk4: Disk "medium 2" | entitydim = 2; posx = +2*d/10; r = d/10
  uni1: Union "media" | entitydim = 2; input = {disk3, disk4}
  sel1: Explicit "domains" on all domains
  adj3: Adjacent "exterior" | entitydim = 2; input = {sel1}; outputdim = 1
  box1: Box "axis" | entitydim = 1; xmin = -d/2-w/10; xmax = +d/2+w/10; ymin = -l/20; ymax = +l/20; condition = inside
  disk5: Disk "center" | r = d/10; entitydim = 0
  disk6: Disk "probe 1" | posx = -d/4; r = d/10; entitydim = 0
  disk7: Disk "probe 2" | posx = +d/4; r = d/10; entitydim = 0

Geometry
  geom1 "geometry" (2D, length unit m)
    r1: Rectangle "anode" | pos = {-d/2-w/2, 0}; base = center; size = {w, l}
    r2: Rectangle "cathode" | pos = {+d/2+w/2, 0}; base = center; size = {w, l}
    boxsel1: BoxSelection "vertices" | entitydim = 0
    fil1: Fillet "rounded" | point = selection boxsel1; radius = 1[mm]
    r3: Rectangle "medium 1" | pos = {-max(l,d+2*w), -max(l,d+2*w)}; size = {max(l,d+2*w), max(l,d+2*w)*2}
    r4: Rectangle "medium 2" | pos = {0, -max(l,d+2*w)}; size = {max(l,d+2*w), max(l,d+2*w)*2}
    pol1: Polygon "axis" | type = open; source = table; table = {{-d/2, 0}, {-d/4, 0}, {0, 0}, {+d/4, 0}, {+d/2, 0}}
    fin: Finalize "Form Union"

Materials
  mat1: Common "medium 1" on selection disk3
    def "Basic"
      relpermittivity = 1
      electricconductivity = 1e-10
      density = 1
      heatcapacity = 1
      thermalconductivity = 1
  mat2: Common "medium 2" on selection disk4
    def "Basic"
      relpermittivity = 2
      electricconductivity = 1e-10
      density = 1
      heatcapacity = 1
      thermalconductivity = 2

Physics
  es: Electrostatics "electrostatic" on selection uni1
    dependent variable V_es
    d.d = l
    ccn1: ChargeConservation "Laplace equation" (default)
    zc1: ZeroCharge (default)
    init1: init "initial values" (default)
    pot1: ElectricPotential "anode" on selection adj1 | V0 = +U/2
    pot2: ElectricPotential "cathode" on selection adj2 | V0 = -U/2
  ec: ConductiveMedia "electric currents" on selection uni1
    dependent variable V_ec
    d.d = l
    cucn1: CurrentConservation (default)
    ein1: ElectricInsulation "insulation" (default)
    init1: init "initial values" (default)
    pot1: ElectricPotential "anode" on selection adj1 | V0 = +U/2*step(t[1/s])
    pot2: ElectricPotential "cathode" on selection adj2 | V0 = -U/2*step(t[1/s])
  ht: HeatTransfer "thermal" on domains 1, 3
    dependent variable T
    solid1: SolidHeatTransferModel "Solid 1" (default)
    init1: init "Initial Values 1" (default)
    ins1: ThermalInsulation (default)
    temp1: TemperatureBoundary "anode temp" on boundaries 4-6, 19-22 | T0 = 500 [K]
    temp2: TemperatureBoundary "cathode temp" on boundaries 15-17, 23-26 | T0 = 350 [K]
    sls1: SolidLayeredShell "anode insulation" on boundaries 4-6, 19-22
      k_mat = userdef
      k = 0.1
      rho_mat = userdef
      rho = 1
      Cp_mat = userdef
      Cp = 1
      lth_mat = userdef
      lth = 1e-4[m]
      ins1: ThermalInsulation (default) | allLayers = 0
      etemp1: ExternalTemperature "anode ext temp" on all boundaries | T0 = 500 [K]

Mesh
  mesh1 "mesh" (physics-controlled)

Studies
  std1 "static"
    stat: Stationary | solve for = {es, ht}
  std2 "relaxation"
    time: Transient "Time Dependent" | tlist = range(0, 0.01, 1)
  std3 "sweep"
    param: Parametric "Parametric Sweep" | pname = d; plistarr = 1 2 3; punit = mm
    time: Transient "Time Dependent" | tlist = range(0, 0.01, 1); solve for = {ec, ht}
  std4 "static thermal"
    stat: Stationary "static thermal" | solve for = {ht}

Solver configurations
  sol1 "electrostatic solution" (study std1)
    v1: Variables
    s1: Stationary "stationary solver"
      fc1: FullyCoupled
      dDef: Direct "direct solver"
  sol2 "time-dependent solution" (study std2)
    v1: Variables
    t1: Time "time-dependent solver" | tlist = range(0, 0.01, 1)
      fc1: FullyCoupled
      dDef: Direct "direct solver"
  sol3 "parametric solution" (study std3)
    // same settings as sol2
  sol4 "parametric solutions" (study std3)
  sol8 "Solution 8" (study std4)
    v1: Variables "Dependent Variables 1"
    s1: Stationary "Stationary Solver 1"
      fc1: FullyCoupled | linsolver = d1; initstep = 0.01; minstep = 1.0E-6; maxiter = 50
      d1: Direct "Direct, Heat Transfer Variables (ht)" | linsolver = pardiso; pivotperturb = 1.0E-13

Datasets
  dset1: Solution "electrostatic" | solution = sol1
  dset2: Solution "time-dependent" | solution = sol2
  dset4: Solution "parametric sweep" | solution = sol4
  dset5: Solution | solution = sol8

Derived values
  gev1: EvalGlobal "electrostatic" | data = dset1; table = tbl1; expr = 2*es.intWe/U^2; unit = pF; descr = capacitance
  gev2: EvalGlobal "time-dependent" | data = dset2; table = tbl2; expr = 2*ec.intWe/U^2; unit = pF; descr = capacitance
  gev3: EvalGlobal "parametric" | data = dset4; table = tbl3; expr = 2*ec.intWe/U^2; unit = pF; descr = capacitance

Tables
  tbl1: Table "electrostatic"
    // capacitance
    capacitance (pF)
    0.736785
  tbl2: Table "time-dependent"
    // time-depenent
    Time (s) | capacitance (pF)
    0 | 0.736785
    0.01 | 0.737268
    0.02 | 0.738584
    0.03 | 0.740555
    0.04 | 0.743048
    0.05 | 0.745935
    0.06 | 0.74909
    0.07 | 0.752447
    0.08 | 0.75594
    0.09 | 0.759459
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  tbl3: Table "parametric"
    d (mm) | t (s) | capacitance (pF)
    1 | 0 | 1.31947
    2 | 0 | 0.736785
    3 | 0 | 0.528655

Plots
  pg1: PlotGroup2D "electrostatic field" | data = dset1; title = Electrostatic field (V/m)
    surf1: Surface "field strength" | expr = es.normE
    con1: Contour "equipotentials" | expr = V_es
  pg2: PlotGroup2D "time-dependent field" | data = dset2; title = Time-dependent field (V/m)
    surf1: Surface "field strength" | expr = ec.normE
    con1: Contour "equipotentials" | expr = V_ec
  pg3: PlotGroup1D "evolution" | data = dset2; title = Evolution of field over time; xlabel = t (s); ylabel = |E| (V/m)
    ptgr1: PointGraph "medium 1" on selection disk6 | expr = ec.normE; legends = medium 1
    ptgr2: PointGraph "medium 2" on selection disk7 | expr = ec.normE; legends = medium 2
  pg4: PlotGroup2D "sweep" | data = dset4; title = Time-dependent field (V/m)
    surf1: Surface "field strength" | expr = ec.normE
    con1: Contour "equipotentials" | expr = V_ec
  pg5: PlotGroup2D "temperature field" | data = dset5
    surf1: Surface | expr = T
    str1: Streamline on all boundaries | expr = {+ht.tfluxx, +ht.tfluxy}; descr = + Total heat flux; selnumber = 200
  pg7: PlotGroup1D "temperature, insulated node" | data = dset5
    lngr1: LineGraph "ext. temp (set bc)" on boundaries 4-6, 19-22
      expr = T
      xdata = expr
      xdataexpr = y
      legends = int. temp.
    lngr2: LineGraph "internal temp" on boundaries 4-6, 19-22
      expr = ht.TextFace
      descr = External temperature
      xdata = expr
      xdataexpr = y
      legends = ext. temp.

Exports
  data1: Data "field" | data = dset1; expr = es.normE; unit = V/m; descr = electric field strength; filename = field.txt